x := 1
y := cos(sin(5))*sin(2*x)^2/(2*cos(4*x)) → sin(2)^2*cos(sin(5))/(2*cos(4)) = -0.363292
integral(sin(0.5*x + 0.4)/(1.2 + cos(x^2 + 0.4)), x = 0.5 .. 1.3) = 0.451949
integral(x/(2*x^2 - 3*x - 2), x) → 2*ln(-1)/5 + ln(3/2)/10 = 0.0405465 + 1.25664i
x := 1
ln(3*x) = 1.09861
